// COMSOL Multiphysics 5.5.0.292 model "Session3.mph"
// Outline of the model tree

Geometry
  geom1 "Geometry 1" (3D, length unit m)
    fin: Finalize "Form Union"

Physics
  solid: SolidMechanics on all domains
    dependent variable u = {u, v, w}
    lemm1: LinearElasticModel "Linear Elastic Material 1" (default)
    free1: Free (default)
    init1: init "Initial Values 1" (default)
  ec: ConductiveMedia "Electric Currents" on all domains
    dependent variable V
    cucn1: CurrentConservation (default)
    ein1: ElectricInsulation (default)
    init1: init "Initial Values 1" (default)
    pzrm1: PiezoresistiveMaterial on all domains

Multiphysics
  pzrd1: PiezoresistiveEffectDomain "Piezoresistive Effect, Domain Currents 1" on all domains
    Solid_physics = solid
    ElectricCurrents_physics = ec

Mesh
  mesh1 "Mesh 1" (physics-controlled)

Studies
  std1 "Study 1"
    freq: Frequency "Frequency Domain"